Simulations: Version=220
  Report AnalysisReport: EventNames=[Clock].EndOfDay
    VariableNames:
      [Clock].Today
      [Simulation].Name
      [IWeather].MeanT
      [IWeather].MaxT
      [IWeather].MinT
      [IWeather].Radn
      [IWeather].Rain
      [Irrigation].IrrigationApplied
      [Lentil].DaysAfterSowing
      [Lentil].AboveGround.Wt
      [Lentil].AboveGroundDead.Wt
      [Lentil].Fruit.Wt
      [Lentil].Leaf.Canopy.CoverGreen
      [Lentil].Leaf.Canopy.CoverTotal
      [Lentil].Leaf.Canopy.SpecificArea
      [Lentil].Leaf.Live.Wt
      [Lentil].Leaf.Dead.Wt
      [Lentil].Leaf.BranchNumber
      [Lentil].Leaf.Wt
      [Lentil].Leaf.Canopy.LAI
      [Lentil].Leaf.TotalCarbonDemand.TotalDMDemand.DeltaLAIPotential.Vegetative.Delta.BranchNumber
      [Lentil].Leaf.Canopy.Fw
      [Lentil].Leaf.NodeNumber
      [Lentil].Leaf.FloweringMainStemNodes
      [Lentil].Leaf.SpecificAreaTotal
      [Lentil].Phenology.CurrentStageName
      [Lentil].Phenology.AccumulatedTT
      [Lentil].Phenology.AccumulatedEmergedTT
      [Lentil].Phenology.ThermalTime
      [Lentil].Phenology.Stage
      [Lentil].Phenology.Photoperiod
      [Lentil].Phenology.AccumulatedVernalisation
      [Lentil].Phenology.VernalisationSaturation
      [Lentil].Phenology.EarlyWaterStress
      [Lentil].Phenology.FloweringWaterStress
      [Lentil].Population
      [Lentil].Root.Network.Depth
      [Lentil].Stem.Dead.Wt
      [Lentil].Stem.Wt
      [Lentil].Grain.Dead.Wt
      [Lentil].Grain.Size
      [Lentil].Grain.HarvestIndex
      [Lentil].Grain.Number
      [Lentil].Grain.Wt
      [Lentil].Pod.Dead.Wt
      [Lentil].Pod.Wt
      [Lentil].Pod.Number
      [Lentil].Root.Wt
      [Lentil].Nodule.Dead.Wt
      [Lentil].Nodule.Wt
      [Soil].Water.Volumetric
      sum([Soil].Water.MM)
      [Lentil].SowingDate
      [Lentil].SowingData.Cultivar
      [Lentil].SowingData.Population
      [Lentil].SowingDate.DayOfYear
      [Lentil].SowingData.RowSpacing
      [IWeather].Latitude
      [IWeather].Longitude
      [IWeather].FileName
      [Lentil].Phenology.EmergenceDAS
      [Lentil].Phenology.StartBuddingDAS
      [Lentil].Phenology.StartFloweringDAS
      [Lentil].Phenology.StartPoddingDAS
      [Lentil].Phenology.MaturityDAS
      [Lentil].Phenology.EarlyWaterStress
      [Lentil].Phenology.FloweringWaterStress
      [Lentil].Phenology.GrainFillingWaterStress
  Report HarvestReport: EventNames=[Lentil].Harvesting
    VariableNames:
      [Simulation].Name
      [Lentil].Phenology.CurrentStageName
      [Lentil].Phenology.StartBuddingDAS
      [Lentil].Phenology.StartFloweringDAS
      [Lentil].Phenology.StartPoddingDAS
      [Lentil].Phenology.MaturityDAS
