Simulations: Version=220
  Report AnalysisReport
    VariableNames:
      [Clock].Today
      [Simulation].Name
      [IWeather].MinT
      [IWeather].MaxT
      [IWeather].MeanT
      [IWeather].Radn
      [IWeather].Rain
      [IWeather].VPD
      [IWeather].PanEvap
      [IWeather].Wind
      [IWeather].CO2
      [IWeather].Latitude
      [IWeather].Longitude
       [Soil].Water.Volumetric
       [Wheat].Population
       [Wheat].AboveGround.N
       [Wheat].AboveGround.Wt
       [Wheat].AboveGroundDead.N
       [Wheat].AboveGroundDead.Wt
       [Wheat].AboveGroundLive.N
       [Wheat].AboveGroundLive.Wt
       [Wheat].Ear.N
       [Wheat].Ear.NConc
       [Wheat].Ear.Wt
       [Wheat].Grain.N
       [Wheat].Grain.NConc
       [Wheat].Grain.NperKernel
       [Wheat].Grain.Number
       [Wheat].Grain.Size
       [Wheat].Grain.Wt
       [Wheat].Leaf.CoverGreen
       [Wheat].Leaf.CoverTotal
       [Wheat].Leaf.Dead.N
       [Wheat].Leaf.Dead.NConc
       [Wheat].Leaf.Dead.Wt
       [Wheat].Leaf.FinalLeafNumber
       [Wheat].Leaf.Fn
       [Wheat].Leaf.Fw
       [Wheat].Leaf.Height
       [Wheat].Leaf.LAI
       [Wheat].Leaf.Ligules
       [Wheat].Leaf.Live.N
       [Wheat].Leaf.Live.NConc
       [Wheat].Leaf.Live.Wt
       [Wheat].Leaf.MainStemPopulation
       [Wheat].Leaf.Photosynthesis.FT
       [Wheat].Leaf.SpecificArea
       [Wheat].Leaf.SpecificAreaCanopy
       [Wheat].Leaf.SpecificNitrogen
       [Wheat].Leaf.StemNumberPerPlant
       [Wheat].Leaf.StemPopulation
       [Wheat].Leaf.Tips
       [Wheat].Leaf.Transpiration
       [Wheat].Phenology.AccumulatedTT
       [Wheat].Phenology.CurrentPhase.Name
       [Wheat].Phenology.CurrentStageName
       [Wheat].Phenology.EmergenceDAS
       [Wheat].Phenology.HaunStage
       [Wheat].Phenology.Photoperiod
       [Wheat].Phenology.Phyllochron
       [Wheat].Phenology.PTQ
       [Wheat].Phenology.Stage
       [Wheat].Phenology.ThermalTime
       [Wheat].Phenology.Zadok.Stage
       [Wheat].Root.Depth
       [Wheat].Root.N
       [Wheat].Root.NConc
       [Wheat].Root.Wt
       [Wheat].SowingData.Cultivar
       [Wheat].Spike.N
       [Wheat].Spike.NConc
       [Wheat].Spike.Wt
       [Wheat].Stem.N
       [Wheat].Stem.NConc
       [Wheat].Stem.Wt
       [Wheat].StemPlusSpike.N
       [Wheat].StemPlusSpike.Wt
       [Wheat].Total.N
       [Wheat].Total.Wt
       sum([Soil].NO3.kgha)
       sum([Soil].Water.MM)
       [Spectral].NDVI
       1.0 * [Wheat].Grain.Wt / ([Wheat].AboveGround.Wt + 0.00001) as HarvestIndex
      1.0 * [Wheat].Leaf.Live.StorageWt / ([Wheat].Leaf.Live.Wt + 0.00001) as Wheat.Leaf.Live.WSCConc
      1.0 * [Wheat].Leaf.Dead.StorageWt/([Wheat].Leaf.Dead.Wt + 0.00001) as Wheat.Leaf.Dead.WSCConc
      1.0 * ([Wheat].Stem.Live.StorageWt+[Wheat].Stem.Dead.StorageWt) / ([Wheat].Stem.Wt + 0.00001) as Wheat.Stem.WSCConc
      1.0 * ([Wheat].Spike.Live.StorageWt+[Wheat].Spike.Dead.StorageWt) / ([Wheat].Spike.Wt + 0.00001) as Wheat.Spike.WSCConc
    EventNames:
      [Clock].DoReport
      [Wheat].Harvesting
  Report ObsAnalysisReport: EventNames=[Clock].DoReport
    VariableNames:
      [Clock].Today
      [Clock].Today.DayOfYear
      [Simulation].Name
      [IWeather].MinT
      [IWeather].MaxT
      [IWeather].MeanT
      [IWeather].Radn
      [IWeather].Rain
      [IWeather].VPD
      [IWeather].PanEvap
      [IWeather].Wind
      [IWeather].CO2
      [IWeather].Latitude
      [IWeather].Longitude
      [Wheat].DaysAfterSowing
      [Wheat].Phenology.AccumulatedTT
      [Wheat].Phenology.CurrentPhase.Name
      [Wheat].Phenology.CurrentStageName
      [Wheat].Phenology.Photoperiod
      [Wheat].Phenology.PTQ
      [Wheat].Phenology.Stage
      [Wheat].Phenology.ThermalTime
      [Wheat].Phenology.Zadok.Stage
      [Wheat].SowingData.Cultivar
      [Wheat].Population
      [Wheat].Leaf.Photosynthesis.RueAct
      [TT00]
      [TT01]
      [TT02]
      [TT03]
      [TT04]
      [TT05]
      [TT06]
      [TT07]
  AccumulateFunctionGeneral TT00: AccumulateToday=false; NameOfPlantToLink=Wheat; StartStageName=Sowing; EndStageName=HarvestRipe; FractionRemovedOnStage=0; FractionRemovedOnEvent=0; FractionRemovedOnDate=0; FractionRemovedOnCut=0; FractionRemovedOnHarvest=0; FractionRemovedOnGraze=0; FractionRemovedOnPrune=0
    SubDailyInterpolation TTdaily: agregationMethod=1
      WangEngelTempFunction Response: MinTemp=0; OptTemp=26; MaxTemp=37; RefTemp=0; Beta=1; MaximumTemperatureWeighting=0
      HourlySinPpAdjusted InterpolationMethod
  AccumulateFunctionGeneral TT01: AccumulateToday=false; NameOfPlantToLink=Wheat; StartStageName=Sowing; EndStageName=HarvestRipe; FractionRemovedOnStage=0; FractionRemovedOnEvent=0; FractionRemovedOnDate=0; FractionRemovedOnCut=0; FractionRemovedOnHarvest=0; FractionRemovedOnGraze=0; FractionRemovedOnPrune=0
    SubDailyInterpolation TTdaily: agregationMethod=1
      WangEngelTempFunction Response: MinTemp=1; OptTemp=26; MaxTemp=37; RefTemp=0; Beta=1; MaximumTemperatureWeighting=0
      HourlySinPpAdjusted InterpolationMethod
  AccumulateFunctionGeneral TT02: AccumulateToday=false; NameOfPlantToLink=Wheat; StartStageName=Sowing; EndStageName=HarvestRipe; FractionRemovedOnStage=0; FractionRemovedOnEvent=0; FractionRemovedOnDate=0; FractionRemovedOnCut=0; FractionRemovedOnHarvest=0; FractionRemovedOnGraze=0; FractionRemovedOnPrune=0
    SubDailyInterpolation TTdaily: agregationMethod=1
      WangEngelTempFunction Response: MinTemp=2; OptTemp=26; MaxTemp=37; RefTemp=0; Beta=1; MaximumTemperatureWeighting=0
      HourlySinPpAdjusted InterpolationMethod
  AccumulateFunctionGeneral TT03: AccumulateToday=false; NameOfPlantToLink=Wheat; StartStageName=Sowing; EndStageName=HarvestRipe; FractionRemovedOnStage=0; FractionRemovedOnEvent=0; FractionRemovedOnDate=0; FractionRemovedOnCut=0; FractionRemovedOnHarvest=0; FractionRemovedOnGraze=0; FractionRemovedOnPrune=0
    SubDailyInterpolation TTdaily: agregationMethod=1
      WangEngelTempFunction Response: MinTemp=3; OptTemp=26; MaxTemp=37; RefTemp=0; Beta=1; MaximumTemperatureWeighting=0
      HourlySinPpAdjusted InterpolationMethod
  AccumulateFunctionGeneral TT04: AccumulateToday=false; NameOfPlantToLink=Wheat; StartStageName=Sowing; EndStageName=HarvestRipe; FractionRemovedOnStage=0; FractionRemovedOnEvent=0; FractionRemovedOnDate=0; FractionRemovedOnCut=0; FractionRemovedOnHarvest=0; FractionRemovedOnGraze=0; FractionRemovedOnPrune=0
    SubDailyInterpolation TTdaily: agregationMethod=1
      WangEngelTempFunction Response: MinTemp=4; OptTemp=26; MaxTemp=37; RefTemp=0; Beta=1; MaximumTemperatureWeighting=0
      HourlySinPpAdjusted InterpolationMethod
  AccumulateFunctionGeneral TT05: AccumulateToday=false; NameOfPlantToLink=Wheat; StartStageName=Sowing; EndStageName=HarvestRipe; FractionRemovedOnStage=0; FractionRemovedOnEvent=0; FractionRemovedOnDate=0; FractionRemovedOnCut=0; FractionRemovedOnHarvest=0; FractionRemovedOnGraze=0; FractionRemovedOnPrune=0
    SubDailyInterpolation TTdaily: agregationMethod=1
      WangEngelTempFunction Response: MinTemp=5; OptTemp=26; MaxTemp=37; RefTemp=0; Beta=1; MaximumTemperatureWeighting=0
      HourlySinPpAdjusted InterpolationMethod
  AccumulateFunctionGeneral TT06: AccumulateToday=false; NameOfPlantToLink=Wheat; StartStageName=Sowing; EndStageName=HarvestRipe; FractionRemovedOnStage=0; FractionRemovedOnEvent=0; FractionRemovedOnDate=0; FractionRemovedOnCut=0; FractionRemovedOnHarvest=0; FractionRemovedOnGraze=0; FractionRemovedOnPrune=0
    SubDailyInterpolation TTdaily: agregationMethod=1
      WangEngelTempFunction Response: MinTemp=6; OptTemp=26; MaxTemp=37; RefTemp=0; Beta=1; MaximumTemperatureWeighting=0
      HourlySinPpAdjusted InterpolationMethod
  AccumulateFunctionGeneral TT07: AccumulateToday=false; NameOfPlantToLink=Wheat; StartStageName=Sowing; EndStageName=HarvestRipe; FractionRemovedOnStage=0; FractionRemovedOnEvent=0; FractionRemovedOnDate=0; FractionRemovedOnCut=0; FractionRemovedOnHarvest=0; FractionRemovedOnGraze=0; FractionRemovedOnPrune=0
    SubDailyInterpolation TTdaily: agregationMethod=1
      WangEngelTempFunction Response: MinTemp=7; OptTemp=26; MaxTemp=37; RefTemp=0; Beta=1; MaximumTemperatureWeighting=0
      HourlySinPpAdjusted InterpolationMethod
